*HEADING
cubit(cts/mastodon/examples/Adaptive_Mesh/Vessel_NoIsolator.inp): 01/04/2021: 15
version: 15.5b
**
********************************** P A R T S **********************************
*PART, NAME=Part-Default
**
********************************** N O D E S **********************************
*NODE, NSET=ALLNODES
       1,   -2.450000e+00,    3.000385e-16,    6.000000e+00
       2,   -2.412779e+00,    4.254380e-01,    6.000000e+00
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**
********************************** E L E M E N T S ****************************
*ELEMENT, TYPE=C3D8R, ELSET=EB1
       1,     142,     141,      87,      88,      22,      23,      69,      70
       2,      88,      89,     143,     142,      70,      71,      21,      22
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*ELEMENT, TYPE=C3D8R, ELSET=EB2
     973,    1808,    1791,    1820,    1819,    2032,    2012,    2045,    2051
     974,    1819,    1837,    1807,    1808,    2051,    2030,    2031,    2032
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**
********************************** S I D E S E T S **********************************
*ELSET, ELSET=Top_S2
       1,       2,       3,       4,       5,       6
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*SURFACE, NAME=Top
Top_S2, S2
*ELSET, ELSET=Bottom_S1
     163,     164,     165,     166,     167,     168
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*SURFACE, NAME=Bottom
Bottom_S1, S1
*ELSET, ELSET=Interface_S2
     163,     164,     165,     166,     167,     168
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*ELSET, ELSET=Interface_S3
     325,     360,     361,     396,     397,     432
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*ELSET, ELSET=Interface_S4
     340,     341,     342,     343,     344,     345
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*ELSET, ELSET=Interface_S5
     326,     362,     398,     434,     470,     506,     542,     578,     614,     650,
     686,     722,     758,     794,     830
*ELSET, ELSET=Interface_S6
     327,     328,     329,     330,     331,     332
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*SURFACE, NAME=Interface
Interface_S2, S2
Interface_S3, S3
Interface_S4, S4
Interface_S5, S5
Interface_S6, S6
*ELSET, ELSET=Fluid_top_S2
    2737,    2738,    2739,    2740,    2741,    2742
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*SURFACE, NAME=Fluid_top
Fluid_top_S2, S2
*ELSET, ELSET=Moment_S3
     325,     360,     361,     396,     397,     432
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*ELSET, ELSET=Moment_S4
     340,     341,     342,     343,     344,     345
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*ELSET, ELSET=Moment_S5
     326,     362,     398,     434,     470,     506,     542,     578,     614,     650,
     686,     722,     758,     794,     830
*ELSET, ELSET=Moment_S6
     327,     328,     329,     330,     331,     332
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*SURFACE, NAME=Moment
Moment_S3, S3
Moment_S4, S4
Moment_S5, S5
Moment_S6, S6
**
********************************** P R O P E R T I E S ************************
*SOLID SECTION, ELSET=EB1, MATERIAL=Default-Steel
*SOLID SECTION, ELSET=EB2, MATERIAL=Default-Steel
**
*END PART
**
**
**
********************************** E N D   P A R T S **********************************
**
**
********************************** A S S E M B L Y ************************************
**
*ASSEMBLY, NAME=ASSEMBLY1
**
*INSTANCE, NAME=Part-Default_1, PART=Part-Default
*END INSTANCE
**
*END ASSEMBLY
**
**
**
*MATERIAL, NAME = Default-Steel
*ELASTIC, TYPE=ISOTROPIC
2.068000e+05, 2.900000e-01
*DENSITY
7.000000e-06
*CONDUCTIVITY,TYPE=ISO
4.500000e-02
*SPECIFIC HEAT
5.000000e+02
**
**
************************************** H I S T O R Y *************************************
**
*PREPRINT
**
**************************************** S T E P 1 ***************************************
*STEP,INC=100,NAME=Default Set
**
*STATIC
1, 1, 1e-05, 1
**
**
**
**
*END STEP
